aileron_rudder_sizing

#Mach
 0.0

#Iysym   IZsym   Zsym
  0      0     0.0

#Sref    Cref    Bref 	<meters>
17.112      1.74     10.166438904552567

#Xref    Yref    Zref   <meters>
2.3406775631778833      0     -0.131189711


#---------------------------------------------------------
SURFACE
main_wing
#Nchordwise  Cspace   Nspanwise  Sspace
10         1.0         40      1.0

YDUPLICATE
0.0


SECTION
#Xle    Yle      Zle      Chord     Ainc  Nspanwise  Sspace
1.6526  0.0    -0.6007    2.186    2.9984

SECTION
#Xle    Yle      Zle      Chord     Ainc  Nspanwise  Sspace
1.8539  3.815    -0.0984    1.4313    -0.8563
CONTROL
aileron    -1.0   0.8499999999999988   0. 0. 0.  -1

SECTION
#Xle    Yle      Zle      Chord     Ainc  Nspanwise  Sspace
1.8837  4.3794    -0.0241    1.3196    -1.4265
CONTROL
aileron    -1.0   0.8499999999999988   0. 0. 0.  -1

SECTION
#Xle    Yle      Zle      Chord     Ainc  Nspanwise  Sspace
1.9186  5.0832    0.0686    1.1804    -0.9779


#---------------------------------------------------------
SURFACE
horizontal_stabilizer
#Nchordwise  Cspace   Nspanwise  Sspace
10         1.0         40      1.0

YDUPLICATE
0.0


SECTION
#Xle    Yle      Zle      Chord     Ainc  Nspanwise  Sspace
6.5452  0.0    0.2039    1.1976    0.0

SECTION
#Xle    Yle      Zle      Chord     Ainc  Nspanwise  Sspace
6.6024  0.5439    0.2039    1.0901    0.0
CONTROL
elevator    1.0   0.95   0. 0. 0.  +1

SECTION
#Xle    Yle      Zle      Chord     Ainc  Nspanwise  Sspace
6.7002  1.4746    0.2039    0.9062    0.0
CONTROL
elevator    1.0   0.95   0. 0. 0.  +1

SECTION
#Xle    Yle      Zle      Chord     Ainc  Nspanwise  Sspace
6.7554  2.0    0.2039    0.8024    0.0


#---------------------------------------------------------
SURFACE
vertical_stabilizer
#Nchordwise  Cspace   Nspanwise  Sspace
10         1.0         40      -1.1

SECTION
#Xle    Yle      Zle      Chord     Ainc  Nspanwise  Sspace
7.1274  0.0    0.3038    1.0592    0.0

SECTION
#Xle    Yle      Zle      Chord     Ainc  Nspanwise  Sspace
7.3161  0.0    0.8223    0.8672    0.0
CONTROL
rudder    1.0   0.85   0. 0. 0.  +1

SECTION
#Xle    Yle      Zle      Chord     Ainc  Nspanwise  Sspace
7.4127  0.0    1.0877    0.769    0.0
CONTROL
rudder    1.0   0.85   0. 0. 0.  +1

SECTION
#Xle    Yle      Zle      Chord     Ainc  Nspanwise  Sspace
7.6666  0.0    1.7854    0.5107    0.0


#---------------------------------------------------------
SURFACE
fuselage_horizontal
#Nchordwise  Cspace   Nspanwise  Sspace
10           1.0

SECTION
#Xle     Yle      Zle      Chord     Ainc  Nspanwise  Sspace
0.0    -0.6101     0.0     8.35     0.0      1        0

SECTION
#Xle     Yle      Zle      Chord     Ainc  Nspanwise  Sspace
0.0    -0.4881     0.0     8.35     0.0      1        0

SECTION
#Xle     Yle      Zle      Chord     Ainc  Nspanwise  Sspace
0.0    -0.3661     0.0     8.35     0.0      1        0

SECTION
#Xle     Yle      Zle      Chord     Ainc  Nspanwise  Sspace
0.0    -0.2441     0.0     8.35     0.0      1        0

SECTION
#Xle     Yle      Zle      Chord     Ainc  Nspanwise  Sspace
0.0    -0.122     0.0     8.35     0.0      1        0

SECTION
#Xle     Yle      Zle      Chord     Ainc  Nspanwise  Sspace
0.0    0.0     0.0     8.35     0.0      1        0

SECTION
#Xle     Yle      Zle      Chord     Ainc  Nspanwise  Sspace
0.0    0.122     0.0     8.35     0.0      1        0

SECTION
#Xle     Yle      Zle      Chord     Ainc  Nspanwise  Sspace
0.0    0.2441     0.0     8.35     0.0      1        0

SECTION
#Xle     Yle      Zle      Chord     Ainc  Nspanwise  Sspace
0.0    0.3661     0.0     8.35     0.0      1        0

SECTION
#Xle     Yle      Zle      Chord     Ainc  Nspanwise  Sspace
0.0    0.4881     0.0     8.35     0.0      1        0

SECTION
#Xle     Yle      Zle      Chord     Ainc  Nspanwise  Sspace
0.0    0.6101     0.0     8.35     0.0      1        0


#---------------------------------------------------------
SURFACE
fuselage_vertical
#Nchordwise  Cspace   Nspanwise  Sspace
10           1.0

SECTION
#Xle     Yle      Zle      Chord     Ainc  Nspanwise  Sspace
0.0    0.0     -0.8172     8.35     0.0      1        0

SECTION
#Xle     Yle      Zle      Chord     Ainc  Nspanwise  Sspace
0.0    0.0     -0.6538     8.35     0.0      1        0

SECTION
#Xle     Yle      Zle      Chord     Ainc  Nspanwise  Sspace
0.0    0.0     -0.4903     8.35     0.0      1        0

SECTION
#Xle     Yle      Zle      Chord     Ainc  Nspanwise  Sspace
0.0    0.0     -0.3269     8.35     0.0      1        0

SECTION
#Xle     Yle      Zle      Chord     Ainc  Nspanwise  Sspace
0.0    0.0     -0.1634     8.35     0.0      1        0

SECTION
#Xle     Yle      Zle      Chord     Ainc  Nspanwise  Sspace
0.0    0.0     0.0     8.35     0.0      1        0

SECTION
#Xle     Yle      Zle      Chord     Ainc  Nspanwise  Sspace
0.0    0.0     0.1634     8.35     0.0      1        0

SECTION
#Xle     Yle      Zle      Chord     Ainc  Nspanwise  Sspace
0.0    0.0     0.3269     8.35     0.0      1        0

SECTION
#Xle     Yle      Zle      Chord     Ainc  Nspanwise  Sspace
0.0    0.0     0.4903     8.35     0.0      1        0

SECTION
#Xle     Yle      Zle      Chord     Ainc  Nspanwise  Sspace
0.0    0.0     0.6538     8.35     0.0      1        0

SECTION
#Xle     Yle      Zle      Chord     Ainc  Nspanwise  Sspace
0.0    0.0     0.8172     8.35     0.0      1        0
